Tue Jul 25 14:45:24 CEST 2017
ifort (IFORT) 14.0.3 20140422
Copyright (C) 1985-2014 Intel Corporation.  All rights reserved.

;Sim_start : add to simulation model
;$SIZES NO=500 LIM6=500
;Sim_end
$PROBLEM    TTE model,Weibull + Emax + covariate (true model)
$INPUT      ID TIME DOSE CL X DV EVID STIME TCEN AUC
;-----------------------------------------------------data description

; ID, subject identifier

; TIME, in arbitrary time units (days, months, years, etc )

; DOSE=dose, actual dose

; CL, actual clearance

; X=x, bianry covariate (0,1)

; DV, DV = 0 (no event observed = right censored (TRUE), DV = 1, an event occured at time = TIME

; EVID, EVID=3 reset the system at time zero/each new ID; EVID=0 indicates an observation

; STIME, flag which indicates if time was observed (STIME=0) or time is simulated (STIME=1)

; TCEN, censored event time (one time per ID)

; AUC, AUCss = dose[i]/CL[i]

;-----------------------------------------------------
$DATA      TTEdat_v11.csv IGNORE=@ IGNORE=(STIME.EQ.2)

;Sim_start : remove from simulation model
 ; simulated time,ignored for estimation

;IGNORE=(STIME.EQ.0) ; obsTTE time, ignored for simuation

;Sim_end
$SUBROUTINE ADVAN=6 TOL=9
$MODEL      COMP=(HAZARD)
;--------------------------------------------------------------------------------------

;----------------------Initial estimates

;--------------------------------------------------------------------------------------
$THETA  (0,2) ; theta1,Emax (true = 1.663553)
 (0,2) ; theta2,EC50,gamma (true = 2)
 (0,0.6) ; theta3,coffiecent of x,(true = 0.6931472)
 (0,3) ; theta4,shape parameter delta (true = 3)
 (0,0.1) ; theta5,scale parameter lambda (true = 0.0884997)
$OMEGA  0  FIX  ; place holder
;--------------------------------------------------------------------------------------
;----------------------PK parameters
;--------------------------------------------------------------------------------------
$PK
  IF(NEWIND.NE.2) TP=0

  EMAX = THETA(1)
  EC50 = THETA(2)
  COEFF = THETA(3)
  DELTA = THETA(4)
  LAMBDA = THETA(5) * EXP(ETA(1))

  COV = COEFF*X         ; binary covariate effect

;--------------------------------------------------------------------------------------
;----------------------Differential equation
;----------------------Typical Value weibull h0(t) = detla*(lambda^delta)* t^(delta-1)
;--------------------------------------------------------------------------------------

$DES
DEL = 1E-6  ; to keep from taking 0**power
IMMED = 1

BASE = DELTA*(LAMBDA**DELTA)*((T-TP)+DEL)**(DELTA-1)     ; TV baseline weibell hazard

DEFF = (EMAX * AUC * IMMED) /(EC50 + (AUC * IMMED))      ; effect = Weibull + Emax + immediate

DADT(1) = BASE * EXP(DEFF + COV)                         ; Hazard model + covariate

;--------------------------------------------------------------------------------------
;----------------------Predicted TTE
;--------------------------------------------------------------------------------------

$ERROR

 IF(NEWIND.NE.2) OLDCHZ=0   ;reset the cumulative hazard
  CHZ = A(1)-OLDCHZ         ; cumulative hazard from previous time point in data set

  OLDCHZ = A(1)             ;rename old cumulative hazard
  SUR = EXP(-CHZ)           ;survival probability

   DELX = 1E-6
   IMMEDX = 1
   BASEX = DELTA*(LAMBDA**DELTA)*((TIME-TP)+DELX)**(DELTA-1)      ; TV baseline weibell hazard
   DEFFX = (EMAX * AUC * IMMEDX) /(EC50 + (AUC * IMMEDX))         ; effect = Weibull + Emax

   HAZNOW= BASEX * EXP(DEFFX + COV)                               ;  Hazard model + covariate

IF(DV.EQ.0) Y=SUR	                   ;right censored (prob of survival) = S(t)
IF(DV.EQ.1) Y=SUR*HAZNOW		       ;prob density function of event = h(t)*S(t)

;------------------------------------------------------------------------
; Residuals where events DV = 1 and censoring DV = 0
;------------------------------------------------------------------------

; Martingale residual: rM = (1-CENSOR) + log(SURV)
MARTRES = (DV) - CHZ

; deviance residual = sign(rM) * SQRT(-2*(rM + (1-CENS)*log(-log(SURV))))
 SIGNRM = 1
 IF (MARTRES < 0) SIGNRM = -1

IF (MDV.EQ.1) THEN
  DEVRES = 0
ELSE
  DEVRES = SIGNRM * SQRT(-2 * (MARTRES + (DV)*LOG(CHZ)))
ENDIF

;Simulation for model evaluation
IF (ICALL.EQ.4) THEN
CALL RANDOM (2,R)
   DV=0
   RTTE = 0
IF(TIME.EQ.24.0) RTTE=1
IF(R.GE.SUR) THEN
   DV=1
   RTTE = 1
ENDIF
ENDIF

;Sim_start : add/remove for simulation
$COVARIANCE PRINT=E
$ESTIMATION MAXEVAL=9999 METHOD=COND LAPLACE LIKE PRINT=1 SIGL=9
            NSIG=3 MSFO=msfb_6
;$SIMULATION (5988566) (39978 UNIFORM) ONLYSIM NOPREDICTION SUB=100

;Sim_end
$TABLE      FILE=11.tab ONEHEADER ID TIME DOSE CL X DV AUC EVID MDV
            PRED CHZ SUR HAZNOW MARTRES DEVRES NOPRINT NOAPPEND
$TABLE      ID TIME SUR DOSE EVID NOPRINT ONEHEADER FILE=sdtab6
$TABLE      ID CL AUC NOPRINT ONEHEADER FILE=patab6
$TABLE      ID X ONEHEADER FILE=catab6

NM-TRAN MESSAGES
 WARNINGS AND ERRORS (IF ANY) FOR PROBLEM    1
 (WARNING  2) NM-TRAN INFERS THAT THE DATA ARE POPULATION.
 (WARNING  3) THERE MAY BE AN ERROR IN THE ABBREVIATED CODE. THE FOLLOWING
 ONE OR MORE RANDOM VARIABLES ARE DEFINED WITH "IF" STATEMENTS THAT DO NOT
 PROVIDE DEFINITIONS FOR BOTH THE "THEN" AND "ELSE" CASES. IF ALL
 CONDITIONS FAIL, THE VALUES OF THESE VARIABLES WILL BE ZERO.
   Y
 (WARNING  27) THE ABBREVIATED CODE CONTAINS A SIMULATION BLOCK BUT THERE IS
 NO $SIMULATION RECORD.

1NONLINEAR MIXED EFFECTS MODEL PROGRAM (NONMEM) VERSION 7.3.0
 ORIGINALLY DEVELOPED BY STUART BEAL, LEWIS SHEINER, AND ALISON BOECKMANN
 CURRENT DEVELOPERS ARE ROBERT BAUER, ICON DEVELOPMENT SOLUTIONS,
 AND ALISON BOECKMANN. IMPLEMENTATION, EFFICIENCY, AND STANDARDIZATION
 PERFORMED BY NOUS INFOSYSTEMS.
 PROBLEM NO.:         1
 TTE model,Weibull + Emax + covariate (true model)
 TOT. NO. OF OBS RECS:      800
 TOT. NO. OF INDIVIDUALS:    800
 GENERAL NONLINEAR KINETICS MODEL (ADVAN6)
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 #TBLN:      1
 #METH: Laplacian Conditional Estimation
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
 #TERM:
0MINIMIZATION SUCCESSFUL
 NO. OF FUNCTION EVALUATIONS USED:      131
 NO. OF SIG. DIGITS IN FINAL EST.:  3.3

 ETABAR IS THE ARITHMETIC MEAN OF THE ETA-ESTIMATES,
 AND THE P-VALUE IS GIVEN FOR THE NULL HYPOTHESIS THAT THE TRUE MEAN IS 0.

 ETABAR:         0.0000E+00
 SE:             0.0000E+00
 N:                     800

 P VAL.:         1.0000E+00

 ETAshrink(%):   1.0000E+02
 EBVshrink(%):   0.0000E+00
 EPSshrink(%):   1.0000E+02


 #TERE:
 Elapsed estimation time in seconds:   172.25
 Elapsed covariance time in seconds:     5.13

 ********************                         LAPLACIAN CONDITIONAL ESTIMATION                       ********************
 #OBJT:**************                       MINIMUM VALUE OF OBJECTIVE FUNCTION                      ********************
 #OBJV:********************************************     3589.564       **************************************************

 ********************                         LAPLACIAN CONDITIONAL ESTIMATION                       ********************
 ********************                             FINAL PARAMETER ESTIMATE                           ********************

 THETA - VECTOR OF FIXED EFFECTS PARAMETERS   *********
         TH 1      TH 2      TH 3      TH 4      TH 5
         1.84E+00  2.12E+00  6.36E-01  3.08E+00  8.61E-02

 OMEGA - COV MATRIX FOR RANDOM EFFECTS - ETAS  ********
            ETA1
 ETA1
+        0.00E+00

 OMEGA - CORR MATRIX FOR RANDOM EFFECTS - ETAS  *******
            ETA1
 ETA1
+        0.00E+00

 ********************                         LAPLACIAN CONDITIONAL ESTIMATION                       ********************
 ********************                            STANDARD ERROR OF ESTIMATE                          ********************

 THETA - VECTOR OF FIXED EFFECTS PARAMETERS   *********
         TH 1      TH 2      TH 3      TH 4      TH 5
         1.46E-01  4.95E-01  7.17E-02  8.77E-02  2.23E-03

 OMEGA - COV MATRIX FOR RANDOM EFFECTS - ETAS  ********
            ETA1
 ETA1
+       .........

 OMEGA - CORR MATRIX FOR RANDOM EFFECTS - ETAS  *******
            ETA1
 ETA1
+       .........

 ********************                         LAPLACIAN CONDITIONAL ESTIMATION                       ********************
 ********************                          COVARIANCE MATRIX OF ESTIMATE                         ********************

            TH 1      TH 2      TH 3      TH 4      TH 5      OM11
 TH 1
+        2.14E-02
 TH 2
+        3.80E-02  2.45E-01
 TH 3
+        1.33E-03  1.08E-03  5.14E-03
 TH 4
+        4.44E-03  1.61E-03  8.17E-04  7.70E-03
 TH 5
+       -1.16E-04  4.23E-04 -7.89E-05 -1.33E-05  4.99E-06
 OM11
+       ......... ......... ......... ......... ......... .........

 ********************                         LAPLACIAN CONDITIONAL ESTIMATION                       ********************
 ********************                          CORRELATION MATRIX OF ESTIMATE                        ********************

            TH 1      TH 2      TH 3      TH 4      TH 5      OM11
 TH 1
+        1.46E-01
 TH 2
+        5.25E-01  4.95E-01
 TH 3
+        1.27E-01  3.04E-02  7.17E-02
 TH 4
+        3.46E-01  3.70E-02  1.30E-01  8.77E-02
 TH 5
+       -3.55E-01  3.83E-01 -4.93E-01 -6.77E-02  2.23E-03
 OM11
+       ......... ......... ......... ......... ......... .........
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
 ********************                         LAPLACIAN CONDITIONAL ESTIMATION                       ********************
 ********************                      EIGENVALUES OF COR MATRIX OF ESTIMATE                     ********************

             1         2         3         4         5
         6.89E-02  6.90E-01  8.99E-01  1.55E+00  1.80E+00
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 #CPUT: Total CPU Time in Seconds,       19.344
